<neuroml xmlns="http://www.neuroml.org/schema/neuroml2"  xmlns:xs="http://www.w3.org/2001/XMLSchema" xmlns:xsi="http://www.w3.org/2001/XMLSchema-instance" xsi:schemaLocation="http://www.neuroml.org/schema/neuroml2 https://raw.github.com/NeuroML/NeuroML2/development/Schemas/NeuroML2/NeuroML_v2beta5.xsd" id="pynnnml_doc">
    <IF_curr_alpha id="IF_curr_alpha_inh_mushroom"/>
    <IF_curr_alpha id="IF_curr_alpha_output"/>
    <network id="network">
        <population id="inh_mushroom" component="IF_curr_alpha_inh_mushroom" size="16" type="populationList">
            <instance id="0"/>
            <instance id="1"/>
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        </population>
        <population id="output" component="IF_curr_alpha_output" size="280" type="populationList">
            <instance id="0"/>
            <instance id="1"/>
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        </population>
    </network>
</neuroml>
