<neuroml xmlns="http://www.neuroml.org/schema/neuroml2"  xmlns:xs="http://www.w3.org/2001/XMLSchema" xmlns:xsi="http://www.w3.org/2001/XMLSchema-instance" xsi:schemaLocation="http://www.neuroml.org/schema/neuroml2 https://raw.github.com/NeuroML/NeuroML2/development/Schemas/NeuroML2/NeuroML_v2beta5.xsd" id="PyNNGeNNNeuroML">
    <spikeArray id="SpikeArray_input_layer_0"/>
    <spikeArray id="SpikeArray_input_layer_1"/>
    <spikeArray id="SpikeArray_input_layer_2"/>
    <spikeArray id="SpikeArray_input_layer_3"/>
    <IF_curr_exp id="IF_curr_exp_mushroom" cm="1." i_offset="0." tau_syn_E="5." tau_syn_I="5." v_init="0." tau_m="20." tau_refrac="0.1" v_reset="-65." v_rest="-65." v_thresh="-50."/>
    <IF_curr_exp id="IF_curr_exp_inh_mushroom" cm="1." i_offset="0." tau_syn_E="5." tau_syn_I="5." v_init="0." tau_m="20." tau_refrac="0.1" v_reset="-65." v_rest="-65." v_thresh="-50."/>
    <IF_curr_exp id="IF_curr_exp_output" cm="1." i_offset="0." tau_syn_E="5." tau_syn_I="5." v_init="0." tau_m="20." tau_refrac="0.1" v_reset="-65." v_rest="-65." v_thresh="-50."/>
    <IF_curr_exp id="IF_curr_exp_inh_output" cm="1." i_offset="0." tau_syn_E="5." tau_syn_I="5." v_init="0." tau_m="20." tau_refrac="0.1" v_reset="-65." v_rest="-65." v_thresh="-50."/>
    <expCurrSynapse id="syn_0" tau_syn="5."/>
    <expCurrSynapse id="syn_1" tau_syn="5."/>
    <expCurrSynapse id="syn_2" tau_syn="5."/>
    <expCurrSynapse id="syn_3" tau_syn="5."/>
    <network id="network">
        <population id="input_layer_0" component="SpikeArray_input_layer_0" size="512" type="populationList">
            <instance id="0">
                <location x="0." y="0." z="0."/>
            </instance>
            <instance id="1">
                <location x="1." y="0." z="0."/>
            </instance>
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        </population>
        <population id="input_layer_1" component="SpikeArray_input_layer_1" size="512" type="populationList">
            <instance id="0">
                <location x="0." y="0." z="4."/>
            </instance>
            <instance id="1">
                <location x="1." y="0." z="4."/>
            </instance>
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        </population>
        <population id="input_layer_2" component="SpikeArray_input_layer_2" size="228" type="populationList">
            <instance id="0">
                <location x="0." y="0." z="8."/>
            </instance>
            <instance id="1">
                <location x="1." y="0." z="8."/>
            </instance>
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        </population>
        <population id="input_layer_3" component="SpikeArray_input_layer_3" size="228" type="populationList">
            <instance id="0">
                <location x="0." y="0." z="12."/>
            </instance>
            <instance id="1">
                <location x="1." y="0." z="12."/>
            </instance>
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        </population>
        <population id="mushroom" component="IF_curr_exp_mushroom" size="512" type="populationList">
            <instance id="0">
                <location x="0." y="0." z="16."/>
            </instance>
            <instance id="1">
                <location x="1." y="0." z="16."/>
            </instance>
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        </population>
        <population id="inh_mushroom" component="IF_curr_exp_inh_mushroom" size="156" type="populationList">
            <instance id="0">
                <location x="0." y="0." z="20."/>
            </instance>
            <instance id="1">
                <location x="1." y="0." z="20."/>
            </instance>
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        </population>
        <population id="output" component="IF_curr_exp_output" size="280" type="populationList">
            <instance id="0">
                <location x="0." y="0." z="24."/>
            </instance>
            <instance id="1">
                <location x="1." y="0." z="24."/>
            </instance>
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        </population>
        <population id="inh_output" component="IF_curr_exp_inh_output" size="1" type="populationList">
            <instance id="0">
                <location x="0." y="0." z="28."/>
            </instance>
        </population>
        <projection id="projection_0" presynapticPopulation="input_layer_0" postsynapticPopulation="mushroom" synapse="syn_0">
            <connection id="0" preCellId="../input_layer_0/457/SpikeArray_input_layer_0" postCellId="../mushroom/0/IF_curr_exp_mushroom"/>
            <connection id="0" preCellId="../input_layer_0/344/SpikeArray_input_layer_0" postCellId="../mushroom/0/IF_curr_exp_mushroom"/>
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        </projection>
        <projection id="projection_1" presynapticPopulation="input_layer_1" postsynapticPopulation="mushroom" synapse="syn_1"/>
        <projection id="projection_2" presynapticPopulation="input_layer_2" postsynapticPopulation="mushroom" synapse="syn_2"/>
        <projection id="projection_3" presynapticPopulation="input_layer_3" postsynapticPopulation="mushroom" synapse="syn_3"/>
    </network>
</neuroml>
